// SBML level 2 version 4

model BSA_Rec_Model()

  // Compartments:
  compartment default = 1;

  // Species:
  species Rec in default = init_Rec;  // substance in nM
  species BSA in default = init_BSA;  // substance in nM
  species Rec_BSA in default = 0;  // substance in nM
  species Rec_Rec_BSA in default = 0;  // substance in nM
  species SEAP_State in default = 0;  // substance in au

  // Parameters:
  init_BSA = 1;
  init_Rec = 0.003790645;
  k_bind = 0.0007677861;
  k_bind_complex = 1000;
  k_express = 26.34539;

  // Reactions:
  v1_v_0: Rec + BSA => Rec_BSA; BSA*Rec*k_bind;
  v2_v_1: Rec + Rec_BSA => Rec_Rec_BSA; Rec*Rec_BSA*k_bind_complex;
  v3_v_2: => SEAP_State; Rec_Rec_BSA*k_express;  // modifiers: Rec_Rec_BSA

  // Unit definitions:
  unit time = 3600 second;
  unit nM = 1e-9 mole;
end
